*Heading
** Job name: modifiedgeometry_1 Model name: modified_file
** Generated by: Abaqus/CAE 2023
*Preprint, echo=NO, model=NO, history=NO, contact=NO
**
** PARTS
**
*Part, name=POLARIZATION0WALL-MIDDLEWHOLE
*Node
      1,    98.528801,   81.9419937,           0.
      2,   98.9128647,   81.4024582,           0.
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*Element, type=S4R
    1,     1,  2521,  9706,  2526
    2,  2521,     2,  2522,  9706
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*Nset, nset=SET-1, generate
     1,  15938,      1
*Elset, elset=SET-1, generate
     1,  11289,      1
** Section: Section-1-SET-1
*Shell Section, elset=SET-1, material=PAPER, controls=EC-1
0.26, 5
*End Part
**
**
** ASSEMBLY
**
*Assembly, name=Assembly
**
*Instance, name=POLARIZATION0WALL-MIDDLEWHOLE-1, part=POLARIZATION0WALL-MIDDLEWHOLE
  -417.56023,   596.400853,           0.
*End Instance
**
*Node
      2,          18.,           5.,           0.
      1,          18.,           5.,           0.
*Nset, nset=M_SET-8
 2,
*Nset, nset=SET-11, instance=POLARIZATION0WALL-MIDDLEWHOLE-1
 396, 397, 402, 403, 408, 409
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*Nset, nset=SET-13, instance=POLARIZATION0WALL-MIDDLEWHOLE-1
 249, 250, 255, 256, 261, 262
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*Nset, nset=SET-13_CNS_, internal, instance=POLARIZATION0WALL-MIDDLEWHOLE-1
 249, 250, 255, 256, 261, 262
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*Nset, nset=SET-13_CNS__CNS_, internal, instance=POLARIZATION0WALL-MIDDLEWHOLE-1
 249, 250, 255, 256, 261, 262
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*Nset, nset=SET-13_CNS__CNS__CNS_, internal, instance=POLARIZATION0WALL-MIDDLEWHOLE-1
 249, 250, 255, 256, 261, 262
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*Surface, type=NODE, name=SET-13_CNS__CNS__CNS__CNS_, internal
SET-13_CNS__CNS__CNS_, 1.
** Constraint: CONSTRAINT-1
*Coupling, constraint name=CONSTRAINT-1, ref node=M_SET-8, surface=SET-13_CNS__CNS__CNS__CNS_
*Kinematic
*End Assembly
**
** ELEMENT CONTROLS
**
*Section Controls, name=EC-1, ELEMENT DELETION=YES, MAX DEGRADATION=0.95, hourglass=RELAX STIFFNESS
1., 1., 1.
*Amplitude, name=AMP-1
             0.,              0.,              1.,              3.
**
** MATERIALS
**
*Material, name=PAPER
*Damage Initiation, criterion=DUCTILE
 0.04,0.,0.
*Damage Evolution, type=DISPLACEMENT, softening=TABULAR
0.,  0.
1., 0.1
*Density
 8e-08,
*Elastic
7000., 0.3
*Plastic
     55.,         0.
  57.765, 0.00171865
    59.9,  0.0042966
    62.5,  0.0081635
     65.,   0.013964
     67.,  0.0226645
     69.,  0.0357155
 71.0314,    0.05529
**
** BOUNDARY CONDITIONS
**
** Name: Disp-BC-1 Type: Displacement/Rotation
*Boundary
SET-11, 1, 1
** Name: Disp-BC-2 Type: Displacement/Rotation
*Boundary
SET-11, 2, 2
** Name: Disp-BC-3 Type: Displacement/Rotation
*Boundary
SET-11, 3, 3
** Name: Disp-BC-4 Type: Displacement/Rotation
*Boundary
SET-11, 4, 4
** Name: Disp-BC-5 Type: Displacement/Rotation
*Boundary
SET-11, 5, 5
** Name: Disp-BC-6 Type: Displacement/Rotation
*Boundary
SET-11, 6, 6
** Name: Disp-BC-7 Type: Displacement/Rotation
*Boundary
SET-13, 2, 2
** Name: Disp-BC-8 Type: Displacement/Rotation
*Boundary
SET-13, 4, 4
** Name: Disp-BC-9 Type: Displacement/Rotation
*Boundary
SET-13, 5, 5
** Name: Disp-BC-10 Type: Displacement/Rotation
*Boundary
SET-13, 6, 6
** Name: Disp-BC-11 Type: Displacement/Rotation
*Boundary
SET-13, 3, 3
** ----------------------------------------------------------------
**
** STEP: Step-1
**
*Step, name=Step-1, nlgeom=YES
*Dynamic, Explicit
, 1.
*Bulk Viscosity
0.06, 1.2
**
** BOUNDARY CONDITIONS
**
** Name: Disp-BC-1 Type: Displacement/Rotation
*Boundary, op=NEW
** Name: Disp-BC-2 Type: Displacement/Rotation
*Boundary, op=NEW
** Name: Disp-BC-3 Type: Displacement/Rotation
*Boundary, op=NEW
** Name: Disp-BC-4 Type: Displacement/Rotation
*Boundary, op=NEW
** Name: Disp-BC-5 Type: Displacement/Rotation
*Boundary, op=NEW
** Name: Disp-BC-6 Type: Displacement/Rotation
*Boundary, op=NEW
** Name: Disp-BC-7 Type: Displacement/Rotation
*Boundary, op=NEW
** Name: Disp-BC-8 Type: Displacement/Rotation
*Boundary, op=NEW
** Name: Disp-BC-9 Type: Displacement/Rotation
*Boundary, op=NEW
** Name: Disp-BC-10 Type: Displacement/Rotation
*Boundary, op=NEW
** Name: Disp-BC-11 Type: Displacement/Rotation
*Boundary, op=NEW
** Name: Disp-BC-12 Type: Displacement/Rotation
*Boundary, op=NEW
SET-11, 1, 1
** Name: Disp-BC-13 Type: Displacement/Rotation
*Boundary, op=NEW, amplitude=AMP-1
SET-11, 2, 2, -2.
** Name: Disp-BC-14 Type: Displacement/Rotation
*Boundary, op=NEW
SET-11, 3, 3
** Name: Disp-BC-15 Type: Displacement/Rotation
*Boundary, op=NEW
SET-11, 4, 4
** Name: Disp-BC-16 Type: Displacement/Rotation
*Boundary, op=NEW
SET-11, 5, 5
** Name: Disp-BC-17 Type: Displacement/Rotation
*Boundary, op=NEW
SET-11, 6, 6
** Name: Disp-BC-18 Type: Displacement/Rotation
*Boundary, op=NEW, amplitude=AMP-1
SET-13, 1, 1
** Name: Disp-BC-19 Type: Displacement/Rotation
*Boundary, op=NEW, amplitude=AMP-1
SET-13, 2, 2, 2.
** Name: Disp-BC-20 Type: Displacement/Rotation
*Boundary, op=NEW, amplitude=AMP-1
SET-13, 3, 3
** Name: Disp-BC-21 Type: Displacement/Rotation
*Boundary, op=NEW, amplitude=AMP-1
SET-13, 4, 4
** Name: Disp-BC-22 Type: Displacement/Rotation
*Boundary, op=NEW, amplitude=AMP-1
SET-13, 5, 5
** Name: Disp-BC-23 Type: Displacement/Rotation
*Boundary, op=NEW, amplitude=AMP-1
SET-13, 6, 6
**
** OUTPUT REQUESTS
**
*Restart, write, number interval=1, time marks=NO
**
** FIELD OUTPUT: F-Output-1
**
*Output, field
*Node Output, nset=SET-11
RF,
**
** FIELD OUTPUT: F-Output-2
**
*Output, field, number interval=300
*Node Output, exterior
A, U, V
**
** FIELD OUTPUT: F-Output-3
**
*Element Output, exterior, directions=YES
DMICRT, LE, PE, PEEQ, PEEQVAVG, PEVAVG, S, STATUS, SVAVG
**
** HISTORY OUTPUT: H-Output-1
**
*Output, history, time interval=0.0002
*Node Output, nset=M_SET-8
RT,
**
** HISTORY OUTPUT: H-Output-2
**
*Node Output, nset=SET-11
RT,
**
** HISTORY OUTPUT: H-Output-3
**
*Node Output, nset=SET-13
RT,
*End Step
