*Heading
** Job name: Fig1-topologicalkagome Model name: Fig1-topologicalkagome
** Generated by: Abaqus/CAE 2023
*Preprint, echo=NO, model=NO, history=NO, contact=NO
**
** PARTS
**
*Part, name=PART-6
*Node
      1,  -1.54431129,  -4.61621809,           0.
      2,  -1.50793433,  -4.66657972,           0.
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*Element, type=S4R
    1,    97,    91, 21007, 21016
    2, 21018, 21023, 21019, 21016
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*Nset, nset=SET-1
     1,     2,     3,     4,     5,     6
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*Elset, elset=SET-1
     1,     2,     3,     4,     5,     6
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** Section: Section-1-SET-1
*Shell Section, elset=SET-1, material=MATERIAL-1
0.1, 5
*End Part
**
**
** ASSEMBLY
**
*Assembly, name=Assembly
**
*Instance, name=PART-6-1, part=PART-6
*End Instance
**
*Nset, nset=BOTTOM, instance=PART-6-1
    14,    15,    19,    54,    55,    59
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*Nset, nset=SET-1, instance=PART-6-1
 1806,
*Nset, nset=SET-2, instance=PART-6-1
 20901,
*Nset, nset=SET-3, instance=PART-6-1
 1808,
*Nset, nset=SET-4, instance=PART-6-1
 20916,
*Nset, nset=SET-5, instance=PART-6-1
 1807,
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*Nset, nset=SET-75, instance=PART-6-1
 9411,
*Nset, nset=TOP, instance=PART-6-1
  1835,  1836,  1837,  1871,  1872,  1873
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*End Assembly
**
** MATERIALS
**
*Material, name=MATERIAL-1
*Density
1.,
*Elastic
4000., 0.3
** ----------------------------------------------------------------
**
** STEP: Step-1
**
*Step, name=Step-1, nlgeom=YES, inc=10000
*Static
0.001, 1., 1e-20, 0.01
**
** BOUNDARY CONDITIONS
**
** Name: Disp-BC-1 Type: Displacement/Rotation
*Boundary
SET-75, 1, 1
** Name: Disp-BC-2 Type: Displacement/Rotation
*Boundary
BOTTOM, 2, 2, -1e-06
** Name: Disp-BC-3 Type: Displacement/Rotation
*Boundary
TOP, 2, 2, 1e-06
**
** OUTPUT REQUESTS
**
*Restart, write, frequency=0
**
** FIELD OUTPUT: F-Output-1
**
*Output, field, variable=PRESELECT
**
** HISTORY OUTPUT: H-Output-1
**
*Output, history, variable=PRESELECT
*End Step
