*Heading
** Job name: Nowall_3hinge_static Model name: Nowall_3hinge-static
** Generated by: Abaqus/CAE 2023
*Preprint, echo=NO, model=NO, history=NO, contact=NO
**
** PARTS
**
*Part, name=PART-24
*Node
      1,  0.196108252,   1.86124313,           0.
      2,   -0.1898323,   2.18201351,           0.
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*Element, type=S3
1, 40847, 15638, 15605
2, 40887, 40859, 40885
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*Element, type=S4R
 4, 40854, 15696, 15697, 40851
 5, 40877, 40882, 40876, 40853
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*Elset, elset=SET-1
     1,     2,     3,     4,     5,     6
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** Section: Section-1-SET-1
*Shell Section, elset=SET-1, material=MATERIAL-1
0.1, 5
*End Part
**
**
** ASSEMBLY
**
*Assembly, name=Assembly
**
*Instance, name=PART-24-1, part=PART-24
*End Instance
**
*Nset, nset=SET-1, instance=PART-24-1
  1408,  1410,  1411,  1412,  1442,  1448
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*Nset, nset=SET-2, instance=PART-24-1
     1,     6,     7,     8,    82,  1522
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*End Assembly
*Amplitude, name=AMP-1
             0.,              0.,             0.5,             0.8
**
** MATERIALS
**
*Material, name=MATERIAL-1
*Density
 1e-06,
*Elastic
5000., 0.3
** ----------------------------------------------------------------
**
** STEP: Step-1
**
*Step, name=Step-1, nlgeom=YES, inc=1000
*Static
0.02, 1., 1e-05, 0.1
**
** BOUNDARY CONDITIONS
**
** Name: Disp-BC-1 Type: Displacement/Rotation
*Boundary, amplitude=AMP-1
SET-1, 1, 1
** Name: Disp-BC-2 Type: Displacement/Rotation
*Boundary
SET-1, 2, 2, 0.1
** Name: Disp-BC-3 Type: Displacement/Rotation
*Boundary, amplitude=AMP-1
SET-1, 3, 3
** Name: Disp-BC-4 Type: Displacement/Rotation
*Boundary, amplitude=AMP-1
SET-1, 4, 4
** Name: Disp-BC-5 Type: Displacement/Rotation
*Boundary, amplitude=AMP-1
SET-1, 5, 5
** Name: Disp-BC-6 Type: Displacement/Rotation
*Boundary, amplitude=AMP-1
SET-1, 6, 6
** Name: Disp-BC-7 Type: Displacement/Rotation
*Boundary, amplitude=AMP-1
SET-2, 1, 1
** Name: Disp-BC-8 Type: Displacement/Rotation
*Boundary
SET-2, 2, 2, -0.1
** Name: Disp-BC-9 Type: Displacement/Rotation
*Boundary, amplitude=AMP-1
SET-2, 3, 3
** Name: Disp-BC-10 Type: Displacement/Rotation
*Boundary, amplitude=AMP-1
SET-2, 4, 4
** Name: Disp-BC-11 Type: Displacement/Rotation
*Boundary, amplitude=AMP-1
SET-2, 5, 5
** Name: Disp-BC-12 Type: Displacement/Rotation
*Boundary, amplitude=AMP-1
SET-2, 6, 6
**
** OUTPUT REQUESTS
**
*Restart, write, number interval=1, time marks=NO
**
** FIELD OUTPUT: F-Output-1
**
*Output, field, variable=PRESELECT, number interval=200, time marks=NO
**
** HISTORY OUTPUT: H-Output-1
**
*Output, history, variable=PRESELECT, number interval=200, time marks=NO
*End Step
