*Heading
** Job name: swall_static Model name: StraightWall_3hinges2-static
** Generated by: Abaqus/CAE 2023
*Preprint, echo=NO, model=NO, history=NO, contact=NO
**
** PARTS
**
*Part, name=PART-8
*Node
      1,  -28.3688297,  -16.3411274,           0.
      2,  -28.4381809,  -16.2097492,           0.
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*Element, type=S4R
 1, 30733, 30730, 30803, 30805
 2, 30805, 30803, 30731, 30734
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*Element, type=S3
11, 30859, 30856, 30852
12, 30845, 30862, 30858
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*Elset, elset=SET-1, generate
     1,  37698,      1
*Elset, elset=_I1, internal
     1,     2,     3,     4,     5,     6
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*Elset, elset=_I2, internal
    11,    12,    13,   110,   111,   112
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** Section: Section-1-_I1
*Shell Section, elset=_I1, material=MATERIAL-1, controls=EC-1
0.1, 5
** Section: Section-2-_I2
*Shell Section, elset=_I2, material=MATERIAL-1
0.1, 5
*End Part
**
**
** ASSEMBLY
**
*Assembly, name=Assembly
**
*Instance, name=PART-8-1, part=PART-8
*End Instance
**
*Nset, nset=SET-1, instance=PART-8-1
  3483,  3484,  3485,  3488,  3489,  7289
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*Nset, nset=SET-2, instance=PART-8-1
    25,    26,    27,    28,    40,   123
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*End Assembly
**
** ELEMENT CONTROLS
**
*Section Controls, name=EC-1, ELEMENT DELETION=YES, hourglass=ENHANCED
1., 1., 1.
*Amplitude, name=AMP-1
             0.,              0.,             0.5,             0.8
**
** MATERIALS
**
*Material, name=MATERIAL-1
*Density
 1e-06,
*Elastic
5000., 0.3
** ----------------------------------------------------------------
**
** STEP: Step-1
**
*Step, name=Step-1, nlgeom=YES, inc=10000
*Static
0.02, 1., 1e-09, 0.1
**
** BOUNDARY CONDITIONS
**
** Name: Disp-BC-1 Type: Displacement/Rotation
*Boundary, amplitude=AMP-1
SET-1, 1, 1
** Name: Disp-BC-2 Type: Displacement/Rotation
*Boundary
SET-1, 2, 2, 0.1
** Name: Disp-BC-3 Type: Displacement/Rotation
*Boundary, amplitude=AMP-1
SET-1, 3, 3
** Name: Disp-BC-4 Type: Displacement/Rotation
*Boundary, amplitude=AMP-1
SET-1, 4, 4
** Name: Disp-BC-5 Type: Displacement/Rotation
*Boundary, amplitude=AMP-1
SET-1, 5, 5
** Name: Disp-BC-6 Type: Displacement/Rotation
*Boundary, amplitude=AMP-1
SET-1, 6, 6
** Name: Disp-BC-7 Type: Displacement/Rotation
*Boundary, amplitude=AMP-1
SET-2, 1, 1
** Name: Disp-BC-8 Type: Displacement/Rotation
*Boundary
SET-2, 2, 2, -0.1
** Name: Disp-BC-9 Type: Displacement/Rotation
*Boundary, amplitude=AMP-1
SET-2, 3, 3
** Name: Disp-BC-10 Type: Displacement/Rotation
*Boundary, amplitude=AMP-1
SET-2, 4, 4
** Name: Disp-BC-11 Type: Displacement/Rotation
*Boundary, amplitude=AMP-1
SET-2, 5, 5
** Name: Disp-BC-12 Type: Displacement/Rotation
*Boundary, amplitude=AMP-1
SET-2, 6, 6
**
** OUTPUT REQUESTS
**
*Restart, write, number interval=1, time marks=NO
**
** FIELD OUTPUT: F-Output-1
**
*Output, field, variable=PRESELECT, number interval=200, time marks=NO
**
** HISTORY OUTPUT: H-Output-1
**
*Output, history, variable=PRESELECT, number interval=200, time marks=NO
*End Step
