*Heading
** Job name: zigzagwall_static Model name: zigzagwall_3hinghole-2-Static
** Generated by: Abaqus/CAE 2023
*Preprint, echo=NO, model=NO, history=NO, contact=NO
**
** PARTS
**
*Part, name=Part-13-mesh-2
*Node
  21390,   10.1427555,     3.285712,           0.
  21391,   10.0655766,   3.22156405,           0.
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*Element, type=S4R
1, 61878, 61875, 61948, 61947
2, 61875, 61881, 61949, 61948
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*Element, type=S3R
17, 62000, 61997, 61999
18, 62007, 61967, 62001
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*Elset, elset=_I2_#1_#1_#1_#1_#1, internal
   1,   2,   3,   4,   5,   6
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*Elset, elset=_I2_#1_#1_#1_#2_#1, internal
 204, 205, 206, 207, 208, 209, 210, 211, 213, 214, 215, 217, 218, 219
*Elset, elset=_I2_#1_#1_#1_#3_#1, internal
 407, 408, 409, 410, 411, 412
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*Elset, elset=_I2_#1_#1_#1_#4_#1, internal, generate
 610,  625,    1
*Elset, elset=_I2_#1_#1_#1_#13_#1, internal
 2437, 2438, 2439, 2440, 2441, 2442
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*Elset, elset=_I2_#1_#1_#1_#14_#1, internal
 2640, 2641, 2642, 2643, 2644, 2645, 2646, 2647, 2649, 2650, 2651, 2653, 2654, 2655
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** Region: (Section-1-_I1:SET-1), (Controls:EC-1)
*Elset, elset=_I1, internal
     1,     2,     3,     4,     5,     6
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** Section: Section-1-_I1
*Shell Section, elset=_I1, material=MATERIAL-1, controls=EC-1
0.1, 5
** Region: (Section-1-_I1:SET-1), (Controls:Default)
*Elset, elset=_I2, internal
    17,    18,    19,   110,   111,   112
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** Section: Section-1-_I1
*Shell Section, elset=_I2, material=MATERIAL-1
0.1, 5
*End Part
**
**
** ASSEMBLY
**
*Assembly, name=Assembly
**
*Instance, name=Part-13-mesh-2-1, part=Part-13-mesh-2
*End Instance
**
*Nset, nset=SET-1, instance=Part-13-mesh-2-1
 26497, 26547, 26548, 26557, 26567, 31647
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*Nset, nset=SET-2, instance=Part-13-mesh-2-1
 21507, 21554, 21564, 21578, 26704, 26705
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*End Assembly
**
** ELEMENT CONTROLS
**
*Section Controls, name=EC-1, ELEMENT DELETION=YES, hourglass=RELAX STIFFNESS
1., 1., 1.
*Amplitude, name=AMP-1
             0.,              0.,             0.5,             0.8
**
** MATERIALS
**
*Material, name=MATERIAL-1
*Density
 1e-06,
*Elastic
5000., 0.3
** ----------------------------------------------------------------
**
** STEP: Step-1
**
*Step, name=Step-1, nlgeom=YES, inc=1000
*Static
0.01, 1., 1e-08, 0.1
**
** BOUNDARY CONDITIONS
**
** Name: Disp-BC-1 Type: Displacement/Rotation
*Boundary, amplitude=AMP-1
SET-1, 1, 1
** Name: Disp-BC-2 Type: Displacement/Rotation
*Boundary
SET-1, 2, 2, 0.1
** Name: Disp-BC-3 Type: Displacement/Rotation
*Boundary, amplitude=AMP-1
SET-1, 3, 3
** Name: Disp-BC-4 Type: Displacement/Rotation
*Boundary, amplitude=AMP-1
SET-1, 4, 4
** Name: Disp-BC-5 Type: Displacement/Rotation
*Boundary, amplitude=AMP-1
SET-1, 5, 5
** Name: Disp-BC-6 Type: Displacement/Rotation
*Boundary, amplitude=AMP-1
SET-1, 6, 6
** Name: Disp-BC-7 Type: Displacement/Rotation
*Boundary, amplitude=AMP-1
SET-2, 1, 1
** Name: Disp-BC-8 Type: Displacement/Rotation
*Boundary
SET-2, 2, 2, -0.1
** Name: Disp-BC-9 Type: Displacement/Rotation
*Boundary, amplitude=AMP-1
SET-2, 3, 3
** Name: Disp-BC-10 Type: Displacement/Rotation
*Boundary, amplitude=AMP-1
SET-2, 4, 4
** Name: Disp-BC-11 Type: Displacement/Rotation
*Boundary, amplitude=AMP-1
SET-2, 5, 5
** Name: Disp-BC-12 Type: Displacement/Rotation
*Boundary, amplitude=AMP-1
SET-2, 6, 6
**
** OUTPUT REQUESTS
**
*Restart, write, number interval=1, time marks=NO
**
** FIELD OUTPUT: F-Output-1
**
*Output, field, variable=PRESELECT, number interval=200, time marks=NO
**
** HISTORY OUTPUT: H-Output-1
**
*Output, history, variable=PRESELECT, number interval=200, time marks=NO
*End Step
