*Heading
** Job name: Fig2-s4r-PBC Model name: PBC-triangle-hole-1
** Generated by: Abaqus/CAE 2023
*Preprint, echo=NO, model=NO, history=NO, contact=NO
**
** PARTS
**
*Part, name=PART-6
*Node
      1,  -1.54431129,  -4.61621809,           0.
      2,  -1.50793433,  -4.66657972,           0.
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*Element, type=S4R
    1,    97,    91, 21007, 21016
    2, 21018, 21023, 21019, 21016
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*Nset, nset=SET-1
     1,     2,     3,     4,     5,     6
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*Elset, elset=SET-1
     1,     2,     3,     4,     5,     6
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** Section: Section-1-SET-1
*Shell Section, elset=SET-1, material=MATERIAL-1
0.1, 5
*End Part
**
**
** ASSEMBLY
**
*Assembly, name=Assembly
**
*Instance, name=PART-6-1, part=PART-6
*End Instance
**
*Nset, nset=BOTTOM, instance=PART-6-1
    14,    15,    19,    54,    55,    59
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*Nset, nset=SET-1, instance=PART-6-1
 1806,
*Nset, nset=SET-2, instance=PART-6-1
 20901,
*Nset, nset=SET-3, instance=PART-6-1
 1808,
*Nset, nset=SET-4, instance=PART-6-1
 20916,
*Nset, nset=SET-5, instance=PART-6-1
 1807,
*Nset, nset=SET-6, instance=PART-6-1
 20900,
*Nset, nset=SET-7, instance=PART-6-1
 1567,
*Nset, nset=SET-8, instance=PART-6-1
 20659,
*Nset, nset=SET-9, instance=PART-6-1
 1572,
*Nset, nset=SET-10, instance=PART-6-1
 20684,
*Nset, nset=SET-11, instance=PART-6-1
 1568,
*Nset, nset=SET-12, instance=PART-6-1
 20660,
*Nset, nset=SET-13, instance=PART-6-1
 1494,
*Nset, nset=SET-14, instance=PART-6-1
 1496,
*Nset, nset=SET-15, instance=PART-6-1
 1495,
*Nset, nset=SET-16, instance=PART-6-1
 1259,
*Nset, nset=SET-17, instance=PART-6-1
 1264,
*Nset, nset=SET-18, instance=PART-6-1
 1260,
*Nset, nset=SET-19, instance=PART-6-1
 20541,
*Nset, nset=SET-20, instance=PART-6-1
 20554,
*Nset, nset=SET-21, instance=PART-6-1
 20540,
*Nset, nset=SET-22, instance=PART-6-1
 20327,
*Nset, nset=SET-23, instance=PART-6-1
 20352,
*Nset, nset=SET-24, instance=PART-6-1
 20328,
*Nset, nset=SET-25, instance=PART-6-1
 1180,
*Nset, nset=SET-26, instance=PART-6-1
 1182,
*Nset, nset=SET-27, instance=PART-6-1
 1181,
*Nset, nset=SET-28, instance=PART-6-1
 941,
*Nset, nset=SET-29, instance=PART-6-1
 946,
*Nset, nset=SET-30, instance=PART-6-1
 942,
*Nset, nset=SET-31, instance=PART-6-1
 20198,
*Nset, nset=SET-32, instance=PART-6-1
 20206,
*Nset, nset=SET-33, instance=PART-6-1
 20197,
*Nset, nset=SET-34, instance=PART-6-1
 19992,
*Nset, nset=SET-35, instance=PART-6-1
 20017,
*Nset, nset=SET-36, instance=PART-6-1
 19993,
*Nset, nset=SET-39, instance=PART-6-1
 868,
*Nset, nset=SET-40, instance=PART-6-1
 870,
*Nset, nset=SET-41, instance=PART-6-1
 869,
*Nset, nset=SET-42, instance=PART-6-1
 19896,
*Nset, nset=SET-43, instance=PART-6-1
 19917,
*Nset, nset=SET-44, instance=PART-6-1
 19895,
*Nset, nset=SET-45, instance=PART-6-1
 655,
*Nset, nset=SET-46, instance=PART-6-1
 660,
*Nset, nset=SET-47, instance=PART-6-1
 656,
*Nset, nset=SET-48, instance=PART-6-1
 554,
*Nset, nset=SET-49, instance=PART-6-1
 556,
*Nset, nset=SET-50, instance=PART-6-1
 555,
*Nset, nset=SET-51, instance=PART-6-1
 19670,
*Nset, nset=SET-52, instance=PART-6-1
 19685,
*Nset, nset=SET-53, instance=PART-6-1
 19671,
*Nset, nset=SET-54, instance=PART-6-1
 19567,
*Nset, nset=SET-55, instance=PART-6-1
 19582,
*Nset, nset=SET-56, instance=PART-6-1
 19566,
*Nset, nset=SET-57, instance=PART-6-1
 329,
*Nset, nset=SET-58, instance=PART-6-1
 334,
*Nset, nset=SET-59, instance=PART-6-1
 330,
*Nset, nset=SET-60, instance=PART-6-1
 19330,
*Nset, nset=SET-61, instance=PART-6-1
 19350,
*Nset, nset=SET-62, instance=PART-6-1
 19331,
*Nset, nset=SET-63, instance=PART-6-1
 242,
*Nset, nset=SET-64, instance=PART-6-1
 244,
*Nset, nset=SET-65, instance=PART-6-1
 243,
*Nset, nset=SET-66, instance=PART-6-1
 1,
*Nset, nset=SET-67, instance=PART-6-1
 6,
*Nset, nset=SET-68, instance=PART-6-1
 2,
*Nset, nset=SET-69, instance=PART-6-1
 19229,
*Nset, nset=SET-70, instance=PART-6-1
 19250,
*Nset, nset=SET-71, instance=PART-6-1
 19228,
*Nset, nset=SET-72, instance=PART-6-1
 18992,
*Nset, nset=SET-73, instance=PART-6-1
 19018,
*Nset, nset=SET-74, instance=PART-6-1
 18993,
*Nset, nset=Set-75, instance=PART-6-1
 9411,
*Nset, nset=TOP, instance=PART-6-1
  1835,  1836,  1837,  1871,  1872,  1873
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** Constraint: Eqn-1
*Equation
2
SET-7, 2, 1.
SET-8, 2, -1.
** Constraint: Eqn-2
*Equation
2
SET-66, 2, 1.
SET-72, 2, -1.
** Constraint: Eqn-3
*Equation
2
SET-65, 2, 1.
SET-71, 2, -1.
** Constraint: Eqn-4
*Equation
2
SET-64, 2, 1.
SET-70, 2, -1.
** Constraint: Eqn-5
*Equation
2
SET-63, 2, 1.
SET-69, 2, -1.
** Constraint: Eqn-6
*Equation
2
SET-74, 2, 1.
SET-68, 2, -1.
** Constraint: Eqn-7
*Equation
2
SET-73, 2, 1.
SET-67, 2, -1.
** Constraint: Eqn-8
*Equation
2
SET-5, 2, 1.
SET-6, 2, -1.
** Constraint: Eqn-9
*Equation
2
SET-62, 2, 1.
SET-59, 2, -1.
** Constraint: Eqn-10
*Equation
2
SET-61, 2, 1.
SET-58, 2, -1.
** Constraint: Eqn-11
*Equation
2
SET-60, 2, 1.
SET-57, 2, -1.
** Constraint: Eqn-12
*Equation
2
SET-50, 2, 1.
SET-56, 2, -1.
** Constraint: Eqn-13
*Equation
2
SET-49, 2, 1.
SET-55, 2, -1.
** Constraint: Eqn-14
*Equation
2
SET-48, 2, 1.
SET-54, 2, -1.
** Constraint: Eqn-15
*Equation
2
SET-46, 2, 1.
SET-52, 2, -1.
** Constraint: Eqn-16
*Equation
2
SET-45, 2, 1.
SET-51, 2, -1.
** Constraint: Eqn-17
*Equation
2
SET-53, 2, 1.
SET-47, 2, -1.
** Constraint: Eqn-18
*Equation
2
SET-40, 2, 1.
SET-43, 2, -1.
** Constraint: Eqn-19
*Equation
2
SET-39, 2, 1.
SET-42, 2, -1.
** Constraint: Eqn-20
*Equation
2
SET-3, 2, 1.
SET-4, 2, -1.
** Constraint: Eqn-21
*Equation
2
SET-29, 2, 1.
SET-35, 2, -1.
** Constraint: Eqn-22
*Equation
2
SET-28, 2, 1.
SET-34, 2, -1.
** Constraint: Eqn-23
*Equation
2
SET-26, 2, 1.
SET-32, 2, -1.
** Constraint: Eqn-24
*Equation
2
SET-25, 2, 1.
SET-31, 2, -1.
** Constraint: Eqn-25
*Equation
2
SET-36, 2, 1.
SET-30, 2, -1.
** Constraint: Eqn-26
*Equation
2
SET-33, 2, 1.
SET-27, 2, -1.
** Constraint: Eqn-27
*Equation
2
SET-18, 2, 1.
SET-24, 2, -1.
** Constraint: Eqn-28
*Equation
2
SET-17, 2, 1.
SET-23, 2, -1.
** Constraint: Eqn-29
*Equation
2
SET-16, 2, 1.
SET-22, 2, -1.
** Constraint: Eqn-30
*Equation
2
SET-15, 2, 1.
SET-21, 2, -1.
** Constraint: Eqn-31
*Equation
2
SET-14, 2, 1.
SET-20, 2, -1.
** Constraint: Eqn-32
*Equation
2
SET-1, 2, 1.
SET-2, 2, -1.
** Constraint: Eqn-33
*Equation
2
SET-13, 2, 1.
SET-19, 2, -1.
** Constraint: Eqn-34
*Equation
2
SET-11, 2, 1.
SET-12, 2, -1.
** Constraint: Eqn-35
*Equation
2
SET-9, 2, 1.
SET-10, 2, -1.
** Constraint: Eqn-36
*Equation
2
SET-7, 1, 1.
SET-8, 1, -1.
** Constraint: Eqn-37
*Equation
2
SET-66, 1, 1.
SET-72, 1, -1.
** Constraint: Eqn-38
*Equation
2
SET-65, 1, 1.
SET-71, 1, -1.
** Constraint: Eqn-39
*Equation
2
SET-64, 1, 1.
SET-70, 1, -1.
** Constraint: Eqn-40
*Equation
2
SET-63, 1, 1.
SET-69, 1, -1.
** Constraint: Eqn-41
*Equation
2
SET-74, 1, 1.
SET-68, 1, -1.
** Constraint: Eqn-42
*Equation
2
SET-73, 1, 1.
SET-67, 1, -1.
** Constraint: Eqn-43
*Equation
2
SET-5, 1, 1.
SET-6, 1, -1.
** Constraint: Eqn-44
*Equation
2
SET-62, 1, 1.
SET-59, 1, -1.
** Constraint: Eqn-45
*Equation
2
SET-61, 1, 1.
SET-58, 1, -1.
** Constraint: Eqn-46
*Equation
2
SET-60, 1, 1.
SET-57, 1, -1.
** Constraint: Eqn-47
*Equation
2
SET-50, 1, 1.
SET-56, 1, -1.
** Constraint: Eqn-48
*Equation
2
SET-49, 1, 1.
SET-55, 1, -1.
** Constraint: Eqn-49
*Equation
2
SET-48, 1, 1.
SET-54, 1, -1.
** Constraint: Eqn-50
*Equation
2
SET-46, 1, 1.
SET-52, 1, -1.
** Constraint: Eqn-51
*Equation
2
SET-45, 1, 1.
SET-51, 1, -1.
** Constraint: Eqn-52
*Equation
2
SET-53, 1, 1.
SET-47, 1, -1.
** Constraint: Eqn-53
*Equation
2
SET-40, 1, 1.
SET-43, 1, -1.
** Constraint: Eqn-54
*Equation
2
SET-39, 1, 1.
SET-42, 1, -1.
** Constraint: Eqn-55
*Equation
2
SET-3, 1, 1.
SET-4, 1, -1.
** Constraint: Eqn-56
*Equation
2
SET-29, 1, 1.
SET-35, 1, -1.
** Constraint: Eqn-57
*Equation
2
SET-28, 1, 1.
SET-34, 1, -1.
** Constraint: Eqn-58
*Equation
2
SET-26, 1, 1.
SET-32, 1, -1.
** Constraint: Eqn-59
*Equation
2
SET-25, 1, 1.
SET-31, 1, -1.
** Constraint: Eqn-60
*Equation
2
SET-36, 1, 1.
SET-30, 1, -1.
** Constraint: Eqn-61
*Equation
2
SET-33, 1, 1.
SET-27, 1, -1.
** Constraint: Eqn-62
*Equation
2
SET-18, 1, 1.
SET-24, 1, -1.
** Constraint: Eqn-63
*Equation
2
SET-17, 1, 1.
SET-23, 1, -1.
** Constraint: Eqn-64
*Equation
2
SET-16, 1, 1.
SET-22, 1, -1.
** Constraint: Eqn-65
*Equation
2
SET-15, 1, 1.
SET-21, 1, -1.
** Constraint: Eqn-66
*Equation
2
SET-14, 1, 1.
SET-20, 1, -1.
** Constraint: Eqn-67
*Equation
2
SET-1, 1, 1.
SET-2, 1, -1.
** Constraint: Eqn-68
*Equation
2
SET-13, 1, 1.
SET-19, 1, -1.
** Constraint: Eqn-69
*Equation
2
SET-11, 1, 1.
SET-12, 1, -1.
** Constraint: Eqn-70
*Equation
2
SET-9, 1, 1.
SET-10, 1, -1.
*End Assembly
**
** MATERIALS
**
*Material, name=MATERIAL-1
*Density
1.,
*Elastic
4000., 0.3
** ----------------------------------------------------------------
**
** STEP: Step-1
**
*Step, name=Step-1, nlgeom=YES, inc=10000
*Static
0.001, 1., 1e-20, 0.01
**
** BOUNDARY CONDITIONS
**
** Name: BC-14 Type: Displacement/Rotation
*Boundary
Set-75, 1, 1
** Name: Disp-BC-7 Type: Displacement/Rotation
*Boundary
BOTTOM, 2, 2, -0.1
** Name: Disp-BC-10 Type: Displacement/Rotation
*Boundary
TOP, 2, 2, 0.1
**
** OUTPUT REQUESTS
**
*Restart, write, frequency=0
**
** FIELD OUTPUT: F-Output-1
**
*Output, field, variable=PRESELECT
**
** HISTORY OUTPUT: H-Output-1
**
*Output, history, variable=PRESELECT
*End Step
