*Heading
** Job name: Fig2-NNN-PBC-stretch Model name: Stretchanalysis-NN0-fig3-2-PBC
** Generated by: Abaqus/CAE 2023
*Preprint, echo=NO, model=NO, history=NO, contact=NO
**
** PARTS
**
*Part, name=PART-4
*Node
      1,   15.6018715,   3.58373594,           0.
      2,   10.8864717,   3.19973588,           0.
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*Element, type=T3D2
   1,  597,  645
   2,  645,  646
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*Nset, nset=WIRE-1-SET-1
   8,  30,  46,  52,  69,  77,  89, 100, 112, 118, 135, 150, 158, 173
*Elset, elset=WIRE-1-SET-1, generate
 2966,  2972,     1
*Nset, nset=SET-8
   8,  30,  46,  52,  69,  77,  89, 100, 112, 118, 135, 150, 158, 173
*Elset, elset=SET-8, generate
 2966,  2972,     1
*Nset, nset=ORIGINAL, generate
    1,  1272,     1
*Elset, elset=ORIGINAL
    1,    2,    3,    4,    5,    6
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*Nset, nset=NNB
    1,    2,    3,    4,    5,    6
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*Elset, elset=NNB
    7,   14,   17,   20,   22,   26
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*Nset, nset=SET-3
    1,    2,    3,    4,    5,    6
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*Elset, elset=SET-3
    7,   14,   17,   20,   22,   26
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*Nset, nset=SET-4, generate
    1,  1272,     1
*Elset, elset=SET-4
    1,    2,    3,    4,    5,    6
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** Section: Section-1-SET-4
*Solid Section, elset=SET-4, material=ORIGINAL
1.,
** Section: Section-2-SET-3
*Solid Section, elset=SET-3, material=NNB
1.,
** Section: Section-3-SET-8
*Solid Section, elset=SET-8, material=NNB
1.,
*End Part
**
**
** ASSEMBLY
**
*Assembly, name=Assembly
**
*Instance, name=PART-4-1, part=PART-4
*End Instance
**
*Nset, nset=NODESET_0, instance=PART-4-1
 31,
*Nset, nset=NODESET_1, instance=PART-4-1
 30,
*Nset, nset=NODESET_2, instance=PART-4-1
 8,
*Nset, nset=NODESET_3, instance=PART-4-1
 46,
*Nset, nset=NODESET_4, instance=PART-4-1
 52,
*Nset, nset=NODESET_5, instance=PART-4-1
 69,
*Nset, nset=NODESET_6, instance=PART-4-1
 77,
*Nset, nset=NODESET_7, instance=PART-4-1
 89,
*Nset, nset=NODESET_8, instance=PART-4-1
 100,
*Nset, nset=NODESET_9, instance=PART-4-1
 112,
*Nset, nset=NODESET_10, instance=PART-4-1
 118,
*Nset, nset=NODESET_11, instance=PART-4-1
 135,
*Nset, nset=NODESET_12, instance=PART-4-1
 150,
*Nset, nset=NODESET_13, instance=PART-4-1
 158,
*Nset, nset=NODESET_14, instance=PART-4-1
 173,
*Nset, nset=NODESET_15, instance=PART-4-1
 181,
*Nset, nset=NODESET_16, instance=PART-4-1
 25,
*Nset, nset=NODESET_17, instance=PART-4-1
 23,
*Nset, nset=NODESET_18, instance=PART-4-1
 5,
*Nset, nset=NODESET_19, instance=PART-4-1
 42,
*Nset, nset=NODESET_20, instance=PART-4-1
 53,
*Nset, nset=NODESET_21, instance=PART-4-1
 59,
*Nset, nset=NODESET_22, instance=PART-4-1
 75,
*Nset, nset=NODESET_23, instance=PART-4-1
 86,
*Nset, nset=NODESET_24, instance=PART-4-1
 99,
*Nset, nset=NODESET_25, instance=PART-4-1
 109,
*Nset, nset=NODESET_26, instance=PART-4-1
 125,
*Nset, nset=NODESET_27, instance=PART-4-1
 134,
*Nset, nset=NODESET_28, instance=PART-4-1
 148,
*Nset, nset=NODESET_29, instance=PART-4-1
 156,
*Nset, nset=NODESET_30, instance=PART-4-1
 171,
*Nset, nset=NODESET_31, instance=PART-4-1
 179,
*Nset, nset=NODESET_32, instance=PART-4-1
 1116,
*Nset, nset=NODESET_33, instance=PART-4-1
 1112,
*Nset, nset=NODESET_34, instance=PART-4-1
 1092,
*Nset, nset=NODESET_35, instance=PART-4-1
 1130,
*Nset, nset=NODESET_36, instance=PART-4-1
 1146,
*Nset, nset=NODESET_37, instance=PART-4-1
 1156,
*Nset, nset=NODESET_38, instance=PART-4-1
 1173,
*Nset, nset=NODESET_39, instance=PART-4-1
 1176,
*Nset, nset=NODESET_40, instance=PART-4-1
 1197,
*Nset, nset=NODESET_41, instance=PART-4-1
 1199,
*Nset, nset=NODESET_42, instance=PART-4-1
 1208,
*Nset, nset=NODESET_43, instance=PART-4-1
 1224,
*Nset, nset=NODESET_44, instance=PART-4-1
 1240,
*Nset, nset=NODESET_45, instance=PART-4-1
 1248,
*Nset, nset=NODESET_46, instance=PART-4-1
 1270,
*Nset, nset=NODESET_47, instance=PART-4-1
 1272,
*Nset, nset=NODESET_48, instance=PART-4-1
 1114,
*Nset, nset=NODESET_49, instance=PART-4-1
 1113,
*Nset, nset=NODESET_50, instance=PART-4-1
 1091,
*Nset, nset=NODESET_51, instance=PART-4-1
 1131,
*Nset, nset=NODESET_52, instance=PART-4-1
 1145,
*Nset, nset=NODESET_53, instance=PART-4-1
 1147,
*Nset, nset=NODESET_54, instance=PART-4-1
 1172,
*Nset, nset=NODESET_55, instance=PART-4-1
 1174,
*Nset, nset=NODESET_56, instance=PART-4-1
 1196,
*Nset, nset=NODESET_57, instance=PART-4-1
 1198,
*Nset, nset=NODESET_58, instance=PART-4-1
 1222,
*Nset, nset=NODESET_59, instance=PART-4-1
 1223,
*Nset, nset=NODESET_60, instance=PART-4-1
 1238,
*Nset, nset=NODESET_61, instance=PART-4-1
 1247,
*Nset, nset=NODESET_62, instance=PART-4-1
 1268,
*Nset, nset=NODESET_63, instance=PART-4-1
 1271,
*Nset, nset=SET-3, instance=PART-4-1
   15,   27,   29,   31,  195,  198
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*Nset, nset=SET-4, instance=PART-4-1
  175,  176,  180,  181,  381,  383
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*Nset, nset=Set-76, instance=PART-4-1
 719,
** Constraint: Eqn-1
*Equation
2
NODESET_31, 2, 1.
NODESET_63, 2, -1.
** Constraint: Eqn-2
*Equation
2
NODESET_30, 2, 1.
NODESET_62, 2, -1.
** Constraint: Eqn-3
*Equation
2
NODESET_29, 2, 1.
NODESET_61, 2, -1.
** Constraint: Eqn-4
*Equation
2
NODESET_28, 2, 1.
NODESET_60, 2, -1.
** Constraint: Eqn-5
*Equation
2
NODESET_27, 2, 1.
NODESET_59, 2, -1.
** Constraint: Eqn-6
*Equation
2
NODESET_26, 2, 1.
NODESET_58, 2, -1.
** Constraint: Eqn-7
*Equation
2
NODESET_25, 2, 1.
NODESET_57, 2, -1.
** Constraint: Eqn-8
*Equation
2
NODESET_24, 2, 1.
NODESET_56, 2, -1.
** Constraint: Eqn-9
*Equation
2
NODESET_23, 2, 1.
NODESET_55, 2, -1.
** Constraint: Eqn-10
*Equation
2
NODESET_22, 2, 1.
NODESET_54, 2, -1.
** Constraint: Eqn-11
*Equation
2
NODESET_21, 2, 1.
NODESET_53, 2, -1.
** Constraint: Eqn-12
*Equation
2
NODESET_20, 2, 1.
NODESET_52, 2, -1.
** Constraint: Eqn-13
*Equation
2
NODESET_19, 2, 1.
NODESET_51, 2, -1.
** Constraint: Eqn-14
*Equation
2
NODESET_18, 2, 1.
NODESET_50, 2, -1.
** Constraint: Eqn-15
*Equation
2
NODESET_17, 2, 1.
NODESET_49, 2, -1.
** Constraint: Eqn-16
*Equation
2
NODESET_16, 2, 1.
NODESET_48, 2, -1.
** Constraint: Eqn-17
*Equation
2
NODESET_15, 2, 1.
NODESET_47, 2, -1.
** Constraint: Eqn-18
*Equation
2
NODESET_14, 2, 1.
NODESET_46, 2, -1.
** Constraint: Eqn-19
*Equation
2
NODESET_13, 2, 1.
NODESET_45, 2, -1.
** Constraint: Eqn-20
*Equation
2
NODESET_12, 2, 1.
NODESET_44, 2, -1.
** Constraint: Eqn-21
*Equation
2
NODESET_11, 2, 1.
NODESET_43, 2, -1.
** Constraint: Eqn-22
*Equation
2
NODESET_10, 2, 1.
NODESET_42, 2, -1.
** Constraint: Eqn-23
*Equation
2
NODESET_9, 2, 1.
NODESET_41, 2, -1.
** Constraint: Eqn-24
*Equation
2
NODESET_8, 2, 1.
NODESET_40, 2, -1.
** Constraint: Eqn-25
*Equation
2
NODESET_7, 2, 1.
NODESET_39, 2, -1.
** Constraint: Eqn-26
*Equation
2
NODESET_6, 2, 1.
NODESET_38, 2, -1.
** Constraint: Eqn-27
*Equation
2
NODESET_5, 2, 1.
NODESET_37, 2, -1.
** Constraint: Eqn-28
*Equation
2
NODESET_4, 2, 1.
NODESET_36, 2, -1.
** Constraint: Eqn-29
*Equation
2
NODESET_3, 2, 1.
NODESET_35, 2, -1.
** Constraint: Eqn-30
*Equation
2
NODESET_2, 2, 1.
NODESET_34, 2, -1.
** Constraint: Eqn-31
*Equation
2
NODESET_1, 2, 1.
NODESET_33, 2, -1.
** Constraint: Eqn-32
*Equation
2
NODESET_0, 2, 1.
NODESET_32, 2, -1.
** Constraint: Eqn-33
*Equation
2
NODESET_31, 1, 1.
NODESET_63, 1, -1.
** Constraint: Eqn-34
*Equation
2
NODESET_30, 1, 1.
NODESET_62, 1, -1.
** Constraint: Eqn-35
*Equation
2
NODESET_29, 1, 1.
NODESET_61, 1, -1.
** Constraint: Eqn-36
*Equation
2
NODESET_28, 1, 1.
NODESET_60, 1, -1.
** Constraint: Eqn-37
*Equation
2
NODESET_27, 1, 1.
NODESET_59, 1, -1.
** Constraint: Eqn-38
*Equation
2
NODESET_26, 1, 1.
NODESET_58, 1, -1.
** Constraint: Eqn-39
*Equation
2
NODESET_25, 1, 1.
NODESET_57, 1, -1.
** Constraint: Eqn-40
*Equation
2
NODESET_24, 1, 1.
NODESET_56, 1, -1.
** Constraint: Eqn-41
*Equation
2
NODESET_23, 1, 1.
NODESET_55, 1, -1.
** Constraint: Eqn-42
*Equation
2
NODESET_22, 1, 1.
NODESET_54, 1, -1.
** Constraint: Eqn-43
*Equation
2
NODESET_21, 1, 1.
NODESET_53, 1, -1.
** Constraint: Eqn-44
*Equation
2
NODESET_20, 1, 1.
NODESET_52, 1, -1.
** Constraint: Eqn-45
*Equation
2
NODESET_19, 1, 1.
NODESET_51, 1, -1.
** Constraint: Eqn-46
*Equation
2
NODESET_18, 1, 1.
NODESET_50, 1, -1.
** Constraint: Eqn-47
*Equation
2
NODESET_17, 1, 1.
NODESET_49, 1, -1.
** Constraint: Eqn-48
*Equation
2
NODESET_16, 1, 1.
NODESET_48, 1, -1.
** Constraint: Eqn-49
*Equation
2
NODESET_15, 1, 1.
NODESET_47, 1, -1.
** Constraint: Eqn-50
*Equation
2
NODESET_14, 1, 1.
NODESET_46, 1, -1.
** Constraint: Eqn-51
*Equation
2
NODESET_13, 1, 1.
NODESET_45, 1, -1.
** Constraint: Eqn-52
*Equation
2
NODESET_12, 1, 1.
NODESET_44, 1, -1.
** Constraint: Eqn-53
*Equation
2
NODESET_11, 1, 1.
NODESET_43, 1, -1.
** Constraint: Eqn-54
*Equation
2
NODESET_10, 1, 1.
NODESET_42, 1, -1.
** Constraint: Eqn-55
*Equation
2
NODESET_9, 1, 1.
NODESET_41, 1, -1.
** Constraint: Eqn-56
*Equation
2
NODESET_8, 1, 1.
NODESET_40, 1, -1.
** Constraint: Eqn-57
*Equation
2
NODESET_7, 1, 1.
NODESET_39, 1, -1.
** Constraint: Eqn-58
*Equation
2
NODESET_6, 1, 1.
NODESET_38, 1, -1.
** Constraint: Eqn-59
*Equation
2
NODESET_5, 1, 1.
NODESET_37, 1, -1.
** Constraint: Eqn-60
*Equation
2
NODESET_4, 1, 1.
NODESET_36, 1, -1.
** Constraint: Eqn-61
*Equation
2
NODESET_3, 1, 1.
NODESET_35, 1, -1.
** Constraint: Eqn-62
*Equation
2
NODESET_2, 1, 1.
NODESET_34, 1, -1.
** Constraint: Eqn-63
*Equation
2
NODESET_1, 1, 1.
NODESET_33, 1, -1.
** Constraint: Eqn-64
*Equation
2
NODESET_0, 1, 1.
NODESET_32, 1, -1.
*End Assembly
**
** MATERIALS
**
*Material, name=MATERIAL-1
*Density
1.,
*Elastic
70000., 0.3
*Material, name=NNB
*Elastic
 0.01, 0.3
*Material, name=ORIGINAL
*Elastic
90000., 0.3
**
** BOUNDARY CONDITIONS
**
** Name: Disp-BC-1 Type: Displacement/Rotation
*Boundary
SET-3, 1, 1
** Name: Disp-BC-2 Type: Displacement/Rotation
*Boundary
SET-3, 2, 2
** Name: Disp-BC-3 Type: Displacement/Rotation
*Boundary
SET-3, 3, 3
** Name: Disp-BC-4 Type: Displacement/Rotation
*Boundary
SET-3, 4, 4
** Name: Disp-BC-5 Type: Displacement/Rotation
*Boundary
SET-3, 5, 5
** Name: Disp-BC-6 Type: Displacement/Rotation
*Boundary
SET-3, 6, 6
** ----------------------------------------------------------------
**
** STEP: Step-2
**
*Step, name=Step-2, nlgeom=YES, inc=200
*Static
0.001, 1., 1e-08, 0.01
**
** BOUNDARY CONDITIONS
**
** Name: BC-9 Type: Displacement/Rotation
*Boundary, op=NEW
Set-76, 1, 1
** Name: Disp-BC-1 Type: Displacement/Rotation
*Boundary, op=NEW
** Name: Disp-BC-2 Type: Displacement/Rotation
*Boundary, op=NEW
** Name: Disp-BC-3 Type: Displacement/Rotation
*Boundary, op=NEW
** Name: Disp-BC-4 Type: Displacement/Rotation
*Boundary, op=NEW
** Name: Disp-BC-5 Type: Displacement/Rotation
*Boundary, op=NEW
** Name: Disp-BC-6 Type: Displacement/Rotation
*Boundary, op=NEW
** Name: Disp-BC-7 Type: Displacement/Rotation
*Boundary, op=NEW
SET-3, 2, 2, -0.1
** Name: Disp-BC-8 Type: Displacement/Rotation
*Boundary, op=NEW
SET-4, 2, 2, 0.1
**
** OUTPUT REQUESTS
**
*Restart, write, frequency=0
**
** FIELD OUTPUT: F-Output-1
**
*Output, field, variable=PRESELECT
**
** HISTORY OUTPUT: H-Output-1
**
*Output, history, variable=PRESELECT
*End Step
