*Heading
** Job name: PBC-triangle-hole3-stretchtwoway Model name: Model-3-hole
** Generated by: Abaqus/CAE 2023
*Preprint, echo=NO, model=NO, history=NO, contact=NO
**
** PARTS
**
*Part, name=Part-6
*Node
      1,  -1.54431129,  -4.61621809,           0.
      2,  -1.50793433,  -4.66657972,           0.
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*Element, type=S4R
 1,    97,    91, 21007, 21016
 2, 21018, 21023, 21019, 21016
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*Nset, nset=Set-1
     1,     2,     3,     4,     5,     6
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*Elset, elset=Set-1
     1,     2,     3,     4,     5,     6
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** Section: Section-1
*Shell Section, elset=Set-1, material=Material-1
0.1, 5
*End Part
**
**
** ASSEMBLY
**
*Assembly, name=Assembly
**
*Instance, name=Part-6-1, part=Part-6
*End Instance
**
*Nset, nset=Bottom, instance=Part-6-1
    14,    15,    19,    54,    55,    59
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*Nset, nset=Set-1, instance=Part-6-1
 1806,
*Nset, nset=Set-2, instance=Part-6-1
 20901,
*Nset, nset=Set-3, instance=Part-6-1
 1808,
*Nset, nset=Set-4, instance=Part-6-1
 20916,
*Nset, nset=Set-5, instance=Part-6-1
 1807,
*Nset, nset=Set-6, instance=Part-6-1
 20900,
*Nset, nset=Set-7, instance=Part-6-1
 1567,
*Nset, nset=Set-8, instance=Part-6-1
 20659,
*Nset, nset=Set-9, instance=Part-6-1
 1572,
*Nset, nset=Set-10, instance=Part-6-1
 20684,
*Nset, nset=Set-11, instance=Part-6-1
 1568,
*Nset, nset=Set-12, instance=Part-6-1
 20660,
*Nset, nset=Set-13, instance=Part-6-1
 1494,
*Nset, nset=Set-14, instance=Part-6-1
 1496,
*Nset, nset=Set-15, instance=Part-6-1
 1495,
*Nset, nset=Set-16, instance=Part-6-1
 1259,
*Nset, nset=Set-17, instance=Part-6-1
 1264,
*Nset, nset=Set-18, instance=Part-6-1
 1260,
*Nset, nset=Set-19, instance=Part-6-1
 20541,
*Nset, nset=Set-20, instance=Part-6-1
 20554,
*Nset, nset=Set-21, instance=Part-6-1
 20540,
*Nset, nset=Set-22, instance=Part-6-1
 20327,
*Nset, nset=Set-23, instance=Part-6-1
 20352,
*Nset, nset=Set-24, instance=Part-6-1
 20328,
*Nset, nset=Set-25, instance=Part-6-1
 1180,
*Nset, nset=Set-26, instance=Part-6-1
 1182,
*Nset, nset=Set-27, instance=Part-6-1
 1181,
*Nset, nset=Set-28, instance=Part-6-1
 941,
*Nset, nset=Set-29, instance=Part-6-1
 946,
*Nset, nset=Set-30, instance=Part-6-1
 942,
*Nset, nset=Set-31, instance=Part-6-1
 20198,
*Nset, nset=Set-32, instance=Part-6-1
 20206,
*Nset, nset=Set-33, instance=Part-6-1
 20197,
*Nset, nset=Set-34, instance=Part-6-1
 19992,
*Nset, nset=Set-35, instance=Part-6-1
 20017,
*Nset, nset=Set-36, instance=Part-6-1
 19993,
*Nset, nset=Set-39, instance=Part-6-1
 868,
*Nset, nset=Set-40, instance=Part-6-1
 870,
*Nset, nset=Set-41, instance=Part-6-1
 869,
*Nset, nset=Set-42, instance=Part-6-1
 19896,
*Nset, nset=Set-43, instance=Part-6-1
 19917,
*Nset, nset=Set-44, instance=Part-6-1
 19895,
*Nset, nset=Set-45, instance=Part-6-1
 655,
*Nset, nset=Set-46, instance=Part-6-1
 660,
*Nset, nset=Set-47, instance=Part-6-1
 656,
*Nset, nset=Set-48, instance=Part-6-1
 554,
*Nset, nset=Set-49, instance=Part-6-1
 556,
*Nset, nset=Set-50, instance=Part-6-1
 555,
*Nset, nset=Set-51, instance=Part-6-1
 19670,
*Nset, nset=Set-52, instance=Part-6-1
 19685,
*Nset, nset=Set-53, instance=Part-6-1
 19671,
*Nset, nset=Set-54, instance=Part-6-1
 19567,
*Nset, nset=Set-55, instance=Part-6-1
 19582,
*Nset, nset=Set-56, instance=Part-6-1
 19566,
*Nset, nset=Set-57, instance=Part-6-1
 329,
*Nset, nset=Set-58, instance=Part-6-1
 334,
*Nset, nset=Set-59, instance=Part-6-1
 330,
*Nset, nset=Set-60, instance=Part-6-1
 19330,
*Nset, nset=Set-61, instance=Part-6-1
 19350,
*Nset, nset=Set-62, instance=Part-6-1
 19331,
*Nset, nset=Set-63, instance=Part-6-1
 242,
*Nset, nset=Set-64, instance=Part-6-1
 244,
*Nset, nset=Set-65, instance=Part-6-1
 243,
*Nset, nset=Set-66, instance=Part-6-1
 1,
*Nset, nset=Set-67, instance=Part-6-1
 6,
*Nset, nset=Set-68, instance=Part-6-1
 2,
*Nset, nset=Set-69, instance=Part-6-1
 19229,
*Nset, nset=Set-70, instance=Part-6-1
 19250,
*Nset, nset=Set-71, instance=Part-6-1
 19228,
*Nset, nset=Set-72, instance=Part-6-1
 18992,
*Nset, nset=Set-73, instance=Part-6-1
 19018,
*Nset, nset=Set-74, instance=Part-6-1
 18993,
*Nset, nset=Top, instance=Part-6-1
  1835,  1836,  1837,  1871,  1872,  1873
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** Constraint: Constraint-1
*Equation
2
Set-1, 1, 1.
Set-2, 1, -1.
** Constraint: Constraint-1-Copy
*Equation
2
Set-1, 2, 1.
Set-2, 2, -1.
** Constraint: Constraint-3
*Equation
2
Set-3, 1, 1.
Set-4, 1, -1.
** Constraint: Constraint-3-Copy
*Equation
2
Set-3, 2, 1.
Set-4, 2, -1.
** Constraint: Constraint-5
*Equation
2
Set-5, 1, 1.
Set-6, 1, -1.
** Constraint: Constraint-5-Copy
*Equation
2
Set-5, 2, 1.
Set-6, 2, -1.
** Constraint: Constraint-7
*Equation
2
Set-7, 1, 1.
Set-8, 1, -1.
** Constraint: Constraint-7-Copy
*Equation
2
Set-7, 2, 1.
Set-8, 2, -1.
** Constraint: Constraint-9
*Equation
2
Set-9, 1, 1.
Set-10, 1, -1.
** Constraint: Constraint-9-Copy
*Equation
2
Set-9, 2, 1.
Set-10, 2, -1.
** Constraint: Constraint-11
*Equation
2
Set-11, 1, 1.
Set-12, 1, -1.
** Constraint: Constraint-11-Copy
*Equation
2
Set-11, 2, 1.
Set-12, 2, -1.
** Constraint: Constraint-13
*Equation
2
Set-13, 1, 1.
Set-19, 1, -1.
** Constraint: Constraint-13-Copy
*Equation
2
Set-13, 2, 1.
Set-19, 2, -1.
** Constraint: Constraint-15
*Equation
2
Set-14, 1, 1.
Set-20, 1, -1.
** Constraint: Constraint-15-Copy
*Equation
2
Set-14, 2, 1.
Set-20, 2, -1.
** Constraint: Constraint-17
*Equation
2
Set-15, 1, 1.
Set-21, 1, -1.
** Constraint: Constraint-17-Copy
*Equation
2
Set-15, 2, 1.
Set-21, 2, -1.
** Constraint: Constraint-19
*Equation
2
Set-16, 1, 1.
Set-22, 1, -1.
** Constraint: Constraint-19-Copy
*Equation
2
Set-16, 2, 1.
Set-22, 2, -1.
** Constraint: Constraint-21
*Equation
2
Set-17, 1, 1.
Set-23, 1, -1.
** Constraint: Constraint-21-Copy
*Equation
2
Set-17, 2, 1.
Set-23, 2, -1.
** Constraint: Constraint-23
*Equation
2
Set-18, 1, 1.
Set-24, 1, -1.
** Constraint: Constraint-23-Copy
*Equation
2
Set-18, 2, 1.
Set-24, 2, -1.
** Constraint: Constraint-25
*Equation
2
Set-25, 1, 1.
Set-31, 1, -1.
** Constraint: Constraint-25-Copy
*Equation
2
Set-25, 2, 1.
Set-31, 2, -1.
** Constraint: Constraint-27
*Equation
2
Set-26, 1, 1.
Set-32, 1, -1.
** Constraint: Constraint-27-Copy
*Equation
2
Set-26, 2, 1.
Set-32, 2, -1.
** Constraint: Constraint-29
*Equation
2
Set-33, 1, 1.
Set-27, 1, -1.
** Constraint: Constraint-29-Copy
*Equation
2
Set-33, 2, 1.
Set-27, 2, -1.
** Constraint: Constraint-31
*Equation
2
Set-28, 1, 1.
Set-34, 1, -1.
** Constraint: Constraint-31-Copy
*Equation
2
Set-28, 2, 1.
Set-34, 2, -1.
** Constraint: Constraint-33
*Equation
2
Set-29, 1, 1.
Set-35, 1, -1.
** Constraint: Constraint-33-Copy
*Equation
2
Set-29, 2, 1.
Set-35, 2, -1.
** Constraint: Constraint-35
*Equation
2
Set-36, 1, 1.
Set-30, 1, -1.
** Constraint: Constraint-35-Copy
*Equation
2
Set-36, 2, 1.
Set-30, 2, -1.
** Constraint: Constraint-37
*Equation
2
Set-39, 1, 1.
Set-42, 1, -1.
** Constraint: Constraint-37-Copy
*Equation
2
Set-39, 2, 1.
Set-42, 2, -1.
** Constraint: Constraint-39
*Equation
2
Set-40, 1, 1.
Set-43, 1, -1.
** Constraint: Constraint-39-Copy
*Equation
2
Set-40, 2, 1.
Set-43, 2, -1.
** Constraint: Constraint-43
*Equation
2
Set-45, 1, 1.
Set-51, 1, -1.
** Constraint: Constraint-43-Copy
*Equation
2
Set-45, 2, 1.
Set-51, 2, -1.
** Constraint: Constraint-45
*Equation
2
Set-46, 1, 1.
Set-52, 1, -1.
** Constraint: Constraint-45-Copy
*Equation
2
Set-46, 2, 1.
Set-52, 2, -1.
** Constraint: Constraint-47
*Equation
2
Set-53, 1, 1.
Set-47, 1, -1.
** Constraint: Constraint-47-Copy
*Equation
2
Set-53, 2, 1.
Set-47, 2, -1.
** Constraint: Constraint-49
*Equation
2
Set-48, 1, 1.
Set-54, 1, -1.
** Constraint: Constraint-49-Copy
*Equation
2
Set-48, 2, 1.
Set-54, 2, -1.
** Constraint: Constraint-51
*Equation
2
Set-49, 1, 1.
Set-55, 1, -1.
** Constraint: Constraint-51-Copy
*Equation
2
Set-49, 2, 1.
Set-55, 2, -1.
** Constraint: Constraint-53
*Equation
2
Set-50, 1, 1.
Set-56, 1, -1.
** Constraint: Constraint-53-Copy
*Equation
2
Set-50, 2, 1.
Set-56, 2, -1.
** Constraint: Constraint-55
*Equation
2
Set-60, 1, 1.
Set-57, 1, -1.
** Constraint: Constraint-55-Copy
*Equation
2
Set-60, 2, 1.
Set-57, 2, -1.
** Constraint: Constraint-57
*Equation
2
Set-61, 1, 1.
Set-58, 1, -1.
** Constraint: Constraint-57-Copy
*Equation
2
Set-61, 2, 1.
Set-58, 2, -1.
** Constraint: Constraint-59
*Equation
2
Set-62, 1, 1.
Set-59, 1, -1.
** Constraint: Constraint-59-Copy
*Equation
2
Set-62, 2, 1.
Set-59, 2, -1.
** Constraint: Constraint-61
*Equation
2
Set-63, 1, 1.
Set-69, 1, -1.
** Constraint: Constraint-61-Copy
*Equation
2
Set-63, 2, 1.
Set-69, 2, -1.
** Constraint: Constraint-63
*Equation
2
Set-64, 1, 1.
Set-70, 1, -1.
** Constraint: Constraint-63-Copy
*Equation
2
Set-64, 2, 1.
Set-70, 2, -1.
** Constraint: Constraint-65
*Equation
2
Set-65, 1, 1.
Set-71, 1, -1.
** Constraint: Constraint-65-Copy
*Equation
2
Set-65, 2, 1.
Set-71, 2, -1.
** Constraint: Constraint-67
*Equation
2
Set-66, 1, 1.
Set-72, 1, -1.
** Constraint: Constraint-67-Copy
*Equation
2
Set-66, 2, 1.
Set-72, 2, -1.
** Constraint: Constraint-69
*Equation
2
Set-73, 1, 1.
Set-67, 1, -1.
** Constraint: Constraint-69-Copy
*Equation
2
Set-73, 2, 1.
Set-67, 2, -1.
** Constraint: Constraint-71
*Equation
2
Set-74, 1, 1.
Set-68, 1, -1.
** Constraint: Constraint-71-Copy
*Equation
2
Set-74, 2, 1.
Set-68, 2, -1.
*End Assembly
**
** MATERIALS
**
*Material, name=Material-1
*Density
1.,
*Elastic
4000., 0.3
**
** BOUNDARY CONDITIONS
**
** Name: BC-1 Type: Displacement/Rotation
*Boundary
Bottom, 1, 1
Bottom, 2, 2
Bottom, 3, 3
** Name: BC-2 Type: Displacement/Rotation
*Boundary
Top, 1, 1
Top, 2, 2
Top, 3, 3
** ----------------------------------------------------------------
**
** STEP: Step-1
**
*Step, name=Step-1, nlgeom=YES, inc=10000
*Static
0.05, 1., 1e-20, 0.1
**
** BOUNDARY CONDITIONS
**
** Name: BC-1 Type: Displacement/Rotation
*Boundary
Bottom, 2, 2, -0.3
Bottom, 4, 4
Bottom, 5, 5
Bottom, 6, 6
** Name: BC-2 Type: Displacement/Rotation
*Boundary
Top, 2, 2, 0.3
Top, 4, 4
Top, 5, 5
Top, 6, 6
**
** OUTPUT REQUESTS
**
*Restart, write, frequency=0
**
** FIELD OUTPUT: F-Output-1
**
*Output, field, variable=PRESELECT
**
** HISTORY OUTPUT: H-Output-1
**
*Output, history, variable=PRESELECT
*End Step
