*Heading
** Job name: Fig2-NNmode Model name: hole-1-mode
** Generated by: Abaqus/CAE 2023
*Preprint, echo=NO, model=NO, history=NO, contact=NO
**
** PARTS
**
*Part, name=ACCOUNTING-MESH-1
*Node
      1,   395.180603,  -89.2416382,           0.
      2,   395.212402,  -88.3456421,           0.
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*Element, type=T3D2
   1,    1,    2
   2,    2,    3
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*Nset, nset=SET-1, generate
    1,  1341,     1
*Elset, elset=SET-1
    1,    2,    3,    4,    5,    6
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** Section: Section-1-SET-1
*Solid Section, elset=SET-1, material=MATERIAL-1
1.,
*End Part
**
**
** ASSEMBLY
**
*Assembly, name=Assembly
**
*Instance, name=ACCOUNTING-MESH-1-1, part=ACCOUNTING-MESH-1
 -398.355988,    75.289642,           0.
*End Instance
**
*Nset, nset=SET-1, instance=ACCOUNTING-MESH-1-1
  767,  780,  798,  811,  847,  860
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*Nset, nset=SET-2, instance=ACCOUNTING-MESH-1-1
  589,  602,  620,  633,  669,  682
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*Nset, nset=SET-3, instance=ACCOUNTING-MESH-1-1
 979,
*Nset, nset=SET-4, instance=ACCOUNTING-MESH-1-1
 1335,
*Nset, nset=SET-5, instance=ACCOUNTING-MESH-1-1
 965,
*Nset, nset=SET-6, instance=ACCOUNTING-MESH-1-1
 1309,
*Nset, nset=SET-7, instance=ACCOUNTING-MESH-1-1
 570,
*Nset, nset=SET-8, instance=ACCOUNTING-MESH-1-1
 1271,
*Nset, nset=SET-9, instance=ACCOUNTING-MESH-1-1
 409,
*Nset, nset=SET-10, instance=ACCOUNTING-MESH-1-1
 1025,
*Nset, nset=SET-11, instance=ACCOUNTING-MESH-1-1
 166,
*Nset, nset=SET-12, instance=ACCOUNTING-MESH-1-1
 740,
*Nset, nset=SET-13, instance=ACCOUNTING-MESH-1-1
 73,
*Nset, nset=SET-14, instance=ACCOUNTING-MESH-1-1
 1180,
*Nset, nset=SET-15, instance=ACCOUNTING-MESH-1-1
 84,
*Nset, nset=SET-16, instance=ACCOUNTING-MESH-1-1
 1274,
*Nset, nset=SET-17, instance=ACCOUNTING-MESH-1-1
 97,
*Nset, nset=SET-18, instance=ACCOUNTING-MESH-1-1
 1248,
*Nset, nset=SET-19, instance=ACCOUNTING-MESH-1-1
 85,
*Nset, nset=SET-20, instance=ACCOUNTING-MESH-1-1
 1104,
*Nset, nset=SET-21, instance=ACCOUNTING-MESH-1-1
 23,
*Nset, nset=SET-22, instance=ACCOUNTING-MESH-1-1
 1108,
*Nset, nset=SET-23, instance=ACCOUNTING-MESH-1-1
 88,
*Nset, nset=SET-24, instance=ACCOUNTING-MESH-1-1
 1110,
*Nset, nset=SET-25, instance=ACCOUNTING-MESH-1-1
 234,
*Nset, nset=SET-26, instance=ACCOUNTING-MESH-1-1
 920,
*Nset, nset=SET-27, instance=ACCOUNTING-MESH-1-1
 453,
*Nset, nset=SET-28, instance=ACCOUNTING-MESH-1-1
 1093,
*Nset, nset=SET-29, instance=ACCOUNTING-MESH-1-1
 748,
*Nset, nset=SET-30, instance=ACCOUNTING-MESH-1-1
 1297,
*Nset, nset=SET-31, instance=ACCOUNTING-MESH-1-1
 1036,
*Nset, nset=SET-32, instance=ACCOUNTING-MESH-1-1
 1321,
*Nset, nset=SET-33, instance=ACCOUNTING-MESH-1-1
 1050,
*Nset, nset=SET-34, instance=ACCOUNTING-MESH-1-1
 1337,
** Constraint: Eqn-1
*Equation
2
SET-7, 2, -1.
SET-8, 2, 1.
** Constraint: Eqn-2
*Equation
2
SET-5, 2, 1.
SET-6, 2, -1.
** Constraint: Eqn-3
*Equation
2
SET-3, 2, 1.
SET-4, 2, -1.
** Constraint: Eqn-4
*Equation
2
SET-33, 2, 1.
SET-34, 2, -1.
** Constraint: Eqn-5
*Equation
2
SET-31, 2, 1.
SET-32, 2, -1.
** Constraint: Eqn-6
*Equation
2
SET-29, 2, 1.
SET-30, 2, -1.
** Constraint: Eqn-7
*Equation
2
SET-28, 2, 1.
SET-27, 2, -1.
** Constraint: Eqn-8
*Equation
2
SET-25, 2, 1.
SET-26, 2, -1.
** Constraint: Eqn-9
*Equation
2
SET-24, 2, 1.
SET-23, 2, -1.
** Constraint: Eqn-10
*Equation
2
SET-21, 2, 1.
SET-22, 2, -1.
** Constraint: Eqn-11
*Equation
2
SET-19, 2, 1.
SET-20, 2, -1.
** Constraint: Eqn-12
*Equation
2
SET-18, 2, 1.
SET-17, 2, -1.
** Constraint: Eqn-13
*Equation
2
SET-15, 2, 1.
SET-16, 2, -1.
** Constraint: Eqn-14
*Equation
2
SET-13, 2, 1.
SET-14, 2, -1.
** Constraint: Eqn-15
*Equation
2
SET-11, 2, 1.
SET-12, 2, -1.
** Constraint: Eqn-16
*Equation
2
SET-9, 2, 1.
SET-10, 2, -1.
** Constraint: Eqn-17
*Equation
2
SET-7, 1, -1.
SET-8, 1, 1.
** Constraint: Eqn-18
*Equation
2
SET-5, 1, 1.
SET-6, 1, -1.
** Constraint: Eqn-19
*Equation
2
SET-3, 1, 1.
SET-4, 1, -1.
** Constraint: Eqn-20
*Equation
2
SET-33, 1, 1.
SET-34, 1, -1.
** Constraint: Eqn-21
*Equation
2
SET-31, 1, 1.
SET-32, 1, -1.
** Constraint: Eqn-22
*Equation
2
SET-29, 1, 1.
SET-30, 1, -1.
** Constraint: Eqn-23
*Equation
2
SET-28, 1, 1.
SET-27, 1, -1.
** Constraint: Eqn-24
*Equation
2
SET-25, 1, 1.
SET-26, 1, -1.
** Constraint: Eqn-25
*Equation
2
SET-24, 1, 1.
SET-23, 1, -1.
** Constraint: Eqn-26
*Equation
2
SET-21, 1, 1.
SET-22, 1, -1.
** Constraint: Eqn-27
*Equation
2
SET-19, 1, 1.
SET-20, 1, -1.
** Constraint: Eqn-28
*Equation
2
SET-18, 1, 1.
SET-17, 1, -1.
** Constraint: Eqn-29
*Equation
2
SET-15, 1, 1.
SET-16, 1, -1.
** Constraint: Eqn-30
*Equation
2
SET-13, 1, 1.
SET-14, 1, -1.
** Constraint: Eqn-31
*Equation
2
SET-11, 1, 1.
SET-12, 1, -1.
** Constraint: Eqn-32
*Equation
2
SET-9, 1, 1.
SET-10, 1, -1.
*End Assembly
**
** MATERIALS
**
*Material, name=MATERIAL-1
*Density
1.,
*Elastic
90000., 0.3
** ----------------------------------------------------------------
**
** STEP: Step-1
**
*Step, name=Step-1, nlgeom=NO, perturbation
*Frequency, sim =YES, eigensolver=subspace, normalization=mass
40, , , 48, 30000
**
** BOUNDARY CONDITIONS
**
** Name: Disp-BC-1 Type: Displacement/Rotation
*Boundary
SET-1, 1, 1
** Name: Disp-BC-2 Type: Displacement/Rotation
*Boundary
SET-1, 2, 2
** Name: Disp-BC-3 Type: Displacement/Rotation
*Boundary
SET-2, 1, 1
** Name: Disp-BC-4 Type: Displacement/Rotation
*Boundary
SET-2, 2, 2
**
** OUTPUT REQUESTS
**
*Restart, write, frequency=0
**
** FIELD OUTPUT: F-Output-1
**
*Output, field
*Node Output
U,
*End Step
